# Angabe:
ρ := 1.204 kg/m^3  # bei 20°C
r := 0.6 m
v_max := 42 m/s
l := 1055 mm
c_u := 42 m/s
c := 35 m/s  # c = angenommen geschw. nach kontakt
D := 60 mm
d := 54 mm
# Rechnung:
c_p := 1 - (c/c_u)^2 = 0.305556
W_D := c_p*ρ/2*v_max^2 = 0.000324478 N/mm^2
A_Ges. := 1130973.36 mm^2  # AGes.....Fläche gesamter Rotordurchmesser
w := W_D*A_Ges. = 366.976 N  # w = Windkraft/last
M_b := w*l = 387160 N*mm
W := π/16*(D^4 - d^4)/D = 14585.3 mm^3
σ_b := M_b/W = 26.5445 N/mm^2
