# https://www.silentwindgenerator.com/de/maritim/
# https://www.e-genius.at/lernfelder/erneuerbare-energien/grundlagen-windenergie/leistung-einer-windkraftanlage
# https://de.wikipedia.org/wiki/Winddruck
# https://www.maschinenbau-wissen.de/skript3/mechanik/balken-biegung/209-biegung-berechnen
# Windgenerator: (Biegung-Rohr) Windkraft mit projizierter Fläche ausgerechnet: (stimmt nicht)
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# Allgemeine Formeln:
# σb=Mb/W
# σb.....Biegespannung
# Mb.....Biegemoment
# W.....Widerstandsmoment
# F.....Windkraft
# l.....Hebelarm
# P.....Leistung des Windes
# ρ.....Dichte
# r.....Rotorradius
# v.....Windgeschwindigkeit
# W=π/32 x (D^4-d^4)/D
# Mb=F x l
# P=(ρx r^2 x πx v^3)/2
# Formeln für Windkraft:
# WD.....Winddruck [N/mm²]
# w.....Windlast [N]
# cp.....Druckbeiwert [-]
# ρ.....Dichte [kg/m³]
# v & c.....Geschwindigkeit
# cu.....Anströmgeschw. vor Kontakt mit Objekt
# WD= cp x ρ/2 x v²
# cp= 1-(c/cu)²
# w= A x WD
# Angabe:
ρ := 1.204 kg/m^3  # bei 20°C
r := 0.6 m
v_max := 18 m/s
l := 1.055 m
c_u := 18 m/s
c := 15 m/s  # c = angenommen geschw. nach kontakt
D := 60 mm
d := 54 mm
# Rechnung:
c_p := 1 - (c/c_u)^2 = 0.305556
W_D := c_p*ρ/2*v_max^2 = 5.9598e-5 N/mm^2
A_Ges. := 85073.67 mm^2
w := W_D*A_Ges. = 5.07022 N  # w = Windkraft/last
M_b := w*l = 5.34908 J
W := π/32*(D^4 - d^4)/D = 0.00729266 L
σ_b := M_b/W = 733489 N/m^2
# Die Berechnung bezieht sich auf das Rohr. Der Windgenerator arbeitet in diesem zustand nicht und es wurde mit der projizierten Fläche gerechnet. (Windgenerator dreht sich nicht, Kraft ist größer wenn sich der Windgenerator nicht dreht)
