# https://blog.federnshop.com/schenkelfedern-torsionsfedern/
# https://webshop.alcomex.de/schenkelfeder-edelstahl-o-3-00x26-00x15-75-mm-tor2130r
# https://www.hennlich.at/uploads/e_SchenkelfedernDrehfedern2016_Gesamtkapitel.pdf
# https://www.knoerzer.eu/fileadmin/user_upload/user_upload/FK_Kat-Web_20191120_Lay_01.pdf
# Schenkelfeder Berechnung:
# Angabe:
Mn1 := 1 N*m
αn := 90°
d := 3 mm
RH := 0.055 m
αx := 55°
# Fn.....höchste erreichbare Federkraft
# Mn.....maximales Drehmoment (Angabe - Zukaufteil)
# RH.....Hebelarm
# αx.....vorgegebenen Drehwinkel
# αn.....maximaler Drehwinkel
# c.....Federkonstante Moment pro Grad Drehwinkel
# Berechnung:
Fn := Mn1/RH = 18.1818 N
# 1. Anmerkung:
# Berechnet -> maximale kraft von Wind senkrecht auf solar ist 2,313kg -> 22,69N bedeutet, wenn der Wind auf die Fläche trifft bleibt das Solarpaneel nicht offen, weil die maximale Federkraft nur 18,182N beträgt. (ohne Berücksichtigung von den Gegengewichten und Eigengewicht)
# Mit Gegengewichten:
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m_gg := 20.72 kg
m_g := 15.323 kg
b := 0.0095 m
F_W := 22.69 N
F_n := 18.182 N
a := 0.42 m
# Berechnung:
F_g := m_g*g = 150.267 N
F_gg := m_gg*g = 203.194 N
ΣFx := F_W - F_n = 4.508 N
ΣFy := F_g + F_gg = 353.461 N
ΣM := ΣFx*a - ΣFy*b = -1.46452 N*m
# 2. Anmerkung:
# Solarpaneel bleibt offen, weil noch ein Moment von 1,465 Nm wirkt
