# alle Formeln aus Tabellenbuch Metall | Belastungsfall 2
# Knickung bei Absteifstange:
l := 3500 mm
R := 12.5 mm
r := 10 mm
D := 25 mm
d := 20 mm
E := 200000 N/mm^2
ν := 3  # ν im Maschinenbau (bei Knickung) 3.....10
# Berechnung:
# λ.....Schlankheitsgrad
# i .....Bezugsradius
# I.....Flächenmoment 2. Grades
# S.....Querschnittsfläche
# σ_K.....Knickspannung nach Euler
# FK.....Knickkraft nach Euler
# ν.....Sicherheitszahl
# σ_dzul.....zulässige Druckspannung
# Fdzul.....zulässige Druckkraft
I := π*(D^4 - d^4)/64 = 11320.8 mm^4
S := R^2*π - r^2*π = 176.715 mm^2
i := sqrt(I/S) = 8.00391 mm
λ := l/i = 437.287
σ_K := E*π^2/λ^2 = 10.3228 N/mm^2
F_K := E*I*π^2/l^2 = 1824.19 N
σ_dzul := σ_K/ν = 3.44093 N/mm^2
F_dzul := F_K/ν = 608.063 N
