# Schraubenberechnung:
# Festigkeitsklasse: 8.8 | Schraube: M10
# Angaben:
F := 230 N
z := 4  # Schraubenanzahl
l_W := 60 mm
l_K := 50 mm  # l_K  # Klemmlänge  # l_W  # Hebel
n := 0.4  # Böge
α_A := 1.65  # Böge
E_S := 2.0*10^5 N/mm^2  # E-Modul Schraube
E_B := 1.8*10^5 N/mm^2  # E-Modul Befestigung (Edelstahl-Platte)
R_e := 640 N/mm^2
R_m := 800 N/mm^2
# Skizze:
# Berechnung:
