# Standgewicht Windgenerator auf Schiffspiegel:
# Angabe:
m_gesW := 49.99 kg
A_auflageW := 9719.42 mm^2
F_W := m_gesW/A_auflageW = 0.00514331 kg/mm^2  # 0.005143 kg/mm²
# Standgewicht Solar auf Reling:
# Angabe:
m_gesS := 13.907 kg
A_auflageS := 9840.8 mm^2
F_S := m_gesS/A_auflageS = 0.0014132 kg/mm^2
# Standgewicht Windgenerator auf Schiffspiegel:
# Angabe:
m_W := 22.65 kg
l_W := 60 mm
F := m_W*g = 222.121 N
# Berechnung:
M := F*l_W = 13.3272 N*m
# Standgewicht Solar auf Reling:
# Angabe:
m_S := 13.907 kg
l_S := 180 mm
F := m_S*g = 136.381 N
M := F*l_S = 24.5486 N*m
