# https://www.biancahoegel.de/flug/aerodynamik/staudruck.html
# Staudruck ebene Platte:
#
# Angabe:
A_Ges. := 1.02 m^2
v := 9.271 m/s
ρ := 1.204 kg/m^3  # bei 20°C
p_0 := 1.013 bar  # auf Meereshöhe
# Berechnung:
p_a := p_0 + 1/2*ρ*v^2 = 101352 Pa
# pa.....Druck am Staupunkt
# Δp.....Druckdifferenz
# p0.....Umgebungsdruck
# ρ.....Dichte Luft
# Fp.....Kraft
Δp := p_a - p_0 = 51.7428 Pa
F_p := Δp*A_Ges. = 52.7776 N
