# Abscherung am Bolzen der Absteifstange:
# Angabe:
d := 6 mm
F_w := 6.637 N
a := 2050 mm
r := 3 mm
b := 2912.26 mm
# Skizze:
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# Berechnung:
ΣM_B := F_w*b + F_Sx*a  # error: Diese Variable ist nicht definiert. Prüfen Sie, ob die Beschriftung richtig festgelegt ist.
F_Sx := F_w*b/a = 9.42862 N
F_S := F_Sx/sin(55°) = 11.5102 N
τ_a := F_S/(r^2*π) = 0.407091 N/mm^2
